OpenVSP model (file version 5), 6 components.
Geometry view with OpenVSP parameter names; values to 6 digits, angles in degrees, lengths in the model's unit.
Overall bounding box: X_Min=0 X_Len=2.27361 Y_Min=-0.278583 Y_Len=0.557165 Z_Min=-0.278583 Z_Len=0.557165

Fuselage "Douglas_Dart_V4_Body"
  location (X Y Z) 0 0 0, rotation 0 0 0
  bounding box size 2.27361 0.214 0.214
  Design: Length=2.27361
  cross sections:
    n   XLocPercent  YLocPercent  ZLocPercent  shape
    0   0            0            0            circle Circle_Diameter=0.115638
    1   0.0313745    0            0            circle Circle_Diameter=0.143983
    2   0.062749     0            0            circle Circle_Diameter=0.168095
    3   0.0941236    0            0            circle Circle_Diameter=0.187563
    4   0.125498     0            0            circle Circle_Diameter=0.201976
    5   0.156873     0            0            circle Circle_Diameter=0.210926
    6   0.188247     0            0            circle Circle_Diameter=0.214
    7   0.547062     0            0            as above
    8   0.905876     0            0            as above
    9   0.929407     0            0            circle Circle_Diameter=0.207421
    10  0.952938     0            0            circle Circle_Diameter=0.191443
    11  0.976469     0            0            circle Circle_Diameter=0.171706
    12  1            0            0            circle Circle_Diameter=0.153849

Wing "Wing_Panel"
  location (X Y Z) 1.32408 0.10091 0, rotation 0 0 0
  symmetric about XZ
  bounding box size 0.30874 0.532526 0.0144467
  totals: TotalSpan=0.330707 TotalProjectedSpan=0.330707 TotalChord=0.251345 TotalArea=0.0831214 TotalAR=1.31575 MAC=0.255713
  root: chord 0.308735, twist 0, NACA 4-series Camber=0.02 CamberLoc=0.4 ThickChord=0.04
  sections:
    n  Span      Root_Chord  Tip_Chord  Area       Sweep    Sweep_Location  Dihedral  Twist  Twist_Location  tip airfoil
    1  0.165353  0.308735    0.193955   0.0415607  13.4221  0               0         0      0.25            as above

Wing "Fin_1"
  location (X Y Z) 1.72976 0.0709957 0.0709957, rotation 45 0 0
  bounding box size 0.349366 0.212259 0.212259
  totals: TotalSpan=0.286966 TotalProjectedSpan=0.286966 TotalChord=0.239138 TotalArea=0.0686244 TotalAR=1.2 MAC=0.250607
  root: chord 0.329846, twist 0, NACA 4-series Camber=0 CamberLoc=0.4 ThickChord=0.04
  sections:
    n  Span      Root_Chord  Tip_Chord  Area       Sweep  Sweep_Location  Dihedral  Twist  Twist_Location  tip airfoil
    1  0.286966  0.329846    0.148431   0.0686244  35     0               0         0      0.25            as above

Wing "Fin_2"
  location (X Y Z) 1.72976 -0.0709957 0.0709957, rotation 135 0 0
  bounding box size 0.349366 0.212259 0.212259
  totals: TotalSpan=0.286966 TotalProjectedSpan=0.286966 TotalChord=0.239138 TotalArea=0.0686244 TotalAR=1.2 MAC=0.250607
  root: chord 0.329846, twist 0, NACA 4-series Camber=0 CamberLoc=0.4 ThickChord=0.04
  sections:
    n  Span      Root_Chord  Tip_Chord  Area       Sweep  Sweep_Location  Dihedral  Twist  Twist_Location  tip airfoil
    1  0.286966  0.329846    0.148431   0.0686244  35     0               0         0      0.25            as above

Wing "Fin_3"
  location (X Y Z) 1.72976 -0.0709957 -0.0709957, rotation -135 0 0
  bounding box size 0.349366 0.212259 0.212259
  totals: TotalSpan=0.286966 TotalProjectedSpan=0.286966 TotalChord=0.239138 TotalArea=0.0686244 TotalAR=1.2 MAC=0.250607
  root: chord 0.329846, twist 0, NACA 4-series Camber=0 CamberLoc=0.4 ThickChord=0.04
  sections:
    n  Span      Root_Chord  Tip_Chord  Area       Sweep  Sweep_Location  Dihedral  Twist  Twist_Location  tip airfoil
    1  0.286966  0.329846    0.148431   0.0686244  35     0               0         0      0.25            as above

Wing "Fin_4"
  location (X Y Z) 1.72976 0.0709957 -0.0709957, rotation -45 0 0
  bounding box size 0.349366 0.212259 0.212259
  totals: TotalSpan=0.286966 TotalProjectedSpan=0.286966 TotalChord=0.239138 TotalArea=0.0686244 TotalAR=1.2 MAC=0.250607
  root: chord 0.329846, twist 0, NACA 4-series Camber=0 CamberLoc=0.4 ThickChord=0.04
  sections:
    n  Span      Root_Chord  Tip_Chord  Area       Sweep  Sweep_Location  Dihedral  Twist  Twist_Location  tip airfoil
    1  0.286966  0.329846    0.148431   0.0686244  35     0               0         0      0.25            as above
